<neuroml xmlns="http://www.neuroml.org/schema/neuroml2"  xmlns:xs="http://www.w3.org/2001/XMLSchema" xmlns:xsi="http://www.w3.org/2001/XMLSchema-instance" xsi:schemaLocation="http://www.neuroml.org/schema/neuroml2 https://raw.github.com/NeuroML/NeuroML2/development/Schemas/NeuroML2/NeuroML_v2beta4.xsd" id="CerebellarCortex">
    <include href="Granule_98.cell.nml"></include>
    <include href="Golgi_98.cell.nml"></include>
    <include href="AMPA_GranGol.synapse.nml"></include>
    <include href="GABAA.synapse.nml"></include>
    <include href="purk2.cell.nml"></include>
    <network id="CerebellarCortex" type="networkWithTemperature" temperature="32.0 degC">
        <notes>Network generated using libNeuroML v0.2.6</notes>
        <population id="Grans" component="Granule_98" type="populationList" size="200">
            <instance id="0">
                <location y="79.405901051800001" x="483.37628175499998" z="17.655456663700001"/>
            </instance>
            <instance id="1">
                <location y="0.222987615998" x="104.793830012000001" z="398.32984002500001"/>
            </instance>
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        </population>
        <population id="Golgis" component="Golgi_98" type="populationList" size="40">
            <instance id="0">
                <location y="19.198875781000002" x="253.712079590999991" z="504.90008201400002"/>
            </instance>
            <instance id="1">
                <location y="92.242364444200007" x="345.506426848999979" z="564.084421099999986"/>
            </instance>
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        </population>
        <population id="Purkinjes" component="purk2" type="populationList" size="4">
            <instance id="0">
                <location y="119.685210916000003" x="160.033215374999997" z="364.569597364999993"/>
            </instance>
            <instance id="1">
                <location y="109.060710423000003" x="555.855662620999965" z="203.957570728999997"/>
            </instance>
            <instance id="2">
                <location y="103.566955785000005" x="475.963628953000011" z="366.567044125999985"/>
            </instance>
            <instance id="3">
                <location y="119.106882209000005" x="547.671523136000019" z="91.115049075399995"/>
            </instance>
        </population>
        <projection id="NetConn_Grans_Golgis" postsynapticPopulation="Golgis" presynapticPopulation="Grans" synapse="AMPA_GranGol">
            <connection id="1" preFractionAlong="0.5" preCellId="../Grans/0/Granule_98" postFractionAlong="0.5" postSegmentId="0" postCellId="../Golgis/2/Golgi_98" preSegmentId="0"/>
            <connection id="8" preFractionAlong="0.5" preCellId="../Grans/0/Granule_98" postFractionAlong="0.5" postSegmentId="0" postCellId="../Golgis/9/Golgi_98" preSegmentId="0"/>
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        </projection>
        <projection id="NetConn_Golgis_Grans" postsynapticPopulation="Grans" presynapticPopulation="Golgis" synapse="GABAA">
            <connection id="3" preFractionAlong="0.5" preCellId="../Golgis/4/Golgi_98" postFractionAlong="0.5" postSegmentId="0" postCellId="../Grans/0/Granule_98" preSegmentId="0"/>
            <connection id="14" preFractionAlong="0.5" preCellId="../Golgis/15/Golgi_98" postFractionAlong="0.5" postSegmentId="0" postCellId="../Grans/0/Granule_98" preSegmentId="0"/>
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        </projection>
    </network>
</neuroml>
