<neuroml xmlns="http://www.neuroml.org/schema/neuroml2"  xmlns:xs="http://www.w3.org/2001/XMLSchema" xmlns:xsi="http://www.w3.org/2001/XMLSchema-instance" xsi:schemaLocation="http://www.neuroml.org/schema/neuroml2 https://raw.github.com/NeuroML/NeuroML2/development/Schemas/NeuroML2/NeuroML_v2beta4.xsd" id="Cerebellum3DDemo">
    <include href="Granule_98.cell.nml"></include>
    <include href="Golgi_98.cell.nml"></include>
    <include href="AMPA_GranGol.synapse.nml"></include>
    <include href="GABAA.synapse.nml"></include>
    <network id="Cerebellum3DDemo">
        <population id="Grcs" component="Granule_98" type="populationList" size="400">
            <instance id="0">
                <location y="29.037743956" x="245.318023871999998" z="918.473401090000038"/>
            </instance>
            <instance id="1">
                <location y="63.033309336800002" x="113.828096419000005" z="526.536078826999983"/>
            </instance>
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        </population>
        <population id="Golgis" component="Golgi_98" type="populationList" size="20">
            <instance id="0">
                <location y="29.127374834899999" x="299.588300388999983" z="745.302283786999965"/>
            </instance>
            <instance id="1">
                <location y="34.6666996254" x="372.81027198999999" z="410.465535787000022"/>
            </instance>
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        </population>
        <projection id="net_conn_grc_gol" postsynapticPopulation="Golgis" presynapticPopulation="Grcs" synapse="AMPA_GranGol">
            <connection id="0" preFractionAlong="0.5" preCellId="../Grcs/0/Granule_98" postFractionAlong="0.5" postSegmentId="0" postCellId="../Golgis/7/Golgi_98" preSegmentId="0"/>
            <connection id="1" preFractionAlong="0.5" preCellId="../Grcs/0/Granule_98" postFractionAlong="0.5" postSegmentId="0" postCellId="../Golgis/10/Golgi_98" preSegmentId="0"/>
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        </projection>
        <projection id="net_conn_gol_grc" postsynapticPopulation="Grcs" presynapticPopulation="Golgis" synapse="GABAA">
            <connection id="0" preFractionAlong="0.5" preCellId="../Golgis/18/Golgi_98" postFractionAlong="0.5" postSegmentId="0" postCellId="../Grcs/0/Granule_98" preSegmentId="0"/>
            <connection id="1" preFractionAlong="0.5" preCellId="../Golgis/6/Golgi_98" postFractionAlong="0.5" postSegmentId="0" postCellId="../Grcs/1/Granule_98" preSegmentId="0"/>
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        </projection>
    </network>
</neuroml>
